num_count(bits) := 2^bits
num_count(8) = 256
log_bin(x) := log(x, 2)
log_bin(400) = 8.64386
distance(start, vel, acc, time) := start + (vel*time) + (acc*time^2)
nel_car(s, t) := distance(s, 10, 10, t)
til_car(s, t) := distance(s, 20, 7.5, t)
# [plot: nel_car(0, t), til_car(0, t) vs t]
nel_car(0, 60) - til_car(s, 60) == 0 solve, s → 8400.0
damage(wd, cs, pr, lv) := wd*(cs/12)^pr + sqrt(lv)
# [plot: damage(6, x, 1, 1) vs x]
# [3D plot: damage(6, x, y, 1)]
